""" Construct 2d surface simulation in 3d
created by hsy on 2025-07-22
"""
import time
import Sofa
import SofaRuntime
SofaRuntime.importPlugin("Sofa.Component")
import Sofa.Simulation
import Sofa.Gui
import os, sys
import numpy as np
import numpy.typing as npt
from scipy import sparse
from scipy.sparse import linalg as spla
import copy
import taichi as ti
ti.init(arch=ti.cpu, debug=True, default_fp=ti.f64)

from _DiffPDBend import SoftBend2D

# 设置工作目录为当前脚本所在目录
script_dir = os.path.dirname(os.path.abspath(__file__))
os.chdir(script_dir)  # 修改当前工作目录

root_path = os.path.abspath(os.path.join(script_dir, '..')) # 添加根目录到 sys.path（跨目录导入模块）
sys.path.append(root_path)
from Utilize.GenMsh import mesh_obj_tri, write_mshv2_tri
from Utilize.MathNp import compress_vectors
from Utilize.sofa_utilize import add_move, save_vtu, get_marker_pos, save_pos

def createScene(root, contact:list):
    root.addObject('RequiredPlugin', pluginName=['Sofa.Component',
                                                 'Sofa.Component.Collision',
                                                 'Sofa.Component.Constraint.Projective',
                                                 'Sofa.Component.IO.Mesh',
                                                 'Sofa.Component.LinearSolver',
                                                 'Sofa.GL.Component.Rendering3D'])

    root.dt = 0.01
    root.bbox = [[-0.1, -0.1, 0.], [0.2, 0.2, 0.1]]
    root.gravity = [0., 0., -9.8]
    root.addObject('VisualStyle', displayFlags='showBehaviorModels showVisual showForceFields showInteractionForceFields showWireframe')

    root.addObject('DefaultAnimationLoop', )
    root.addObject('CollisionPipeline', depth="6", verbose="0", draw="0")
    root.addObject('BruteForceBroadPhase', )
    root.addObject('BVHNarrowPhase', )
    root.addObject('NewProximityIntersection', name="Proximity", alarmDistance="0.5", contactDistance="0.2")
    root.addObject('CollisionResponse', name="Response", response="PenalityContactForceField")

    # FEM的设置
    # root.addObject('FreeMotionAnimationLoop')
    # root.addObject('GenericConstraintSolver', tolerance=1e-9, maxIterations=200)

    # root.addObject('CollisionPipeline', name='Pipeline', verbose='0')
    # root.addObject('BruteForceBroadPhase', name='BroadPhase')
    # root.addObject('BVHNarrowPhase', name='NarrowPhase')
    # root.addObject('CollisionResponse', name='Response', response='PenalityContactResponse')
    # root.addObject('MinProximityIntersection', name='Proximity', alarmDistance=0.8, contactDistance=0.5)

    obj = root.addChild('object')
    # Rayleigh阻尼影响了软体振动
    obj.addObject('EulerImplicitSolver', name='odesolver', rayleighStiffness='0.1', rayleighMass='0.1')
    obj.addObject('CGLinearSolver', name='linearsolver', iterations='200', tolerance='1.e-9', threshold='1.e-9')

    # obj.addObject('MeshVTKLoader', name='loader', filename='trian.vtk', scale='1', flipNormals='0')
    obj.addObject('MeshGmshLoader', name='loader', filename='Mesh/shape_split.msh', scale='1', flipNormals='0')
    obj.addObject('MechanicalObject', src='@loader', name='dofs', template='Vec3', translation2=[0., 0., 0.], scale3d=[1.]*3)
    obj.addObject('TriangleSetTopologyContainer', src='@loader', name='container')
    obj.addObject('TriangleSetTopologyModifier', name='modifier')
    obj.addObject('TriangleSetGeometryAlgorithms', name='geomalgo')#, tempate='Vec3')
    obj.addObject('DiagonalMass', name='mass', totalMass='0.1')#, massDensity='0.1')

    X_EPS = 5.e-3
    obj.addObject('BoxROI', name='box', box=f"-0.1 {-X_EPS} -0.1 0.11 {X_EPS} 0.1")
    obj_fixed = obj.addObject('FixedConstraint', name='fixed', indices='@box.indices')

    obj.addObject('MeshSpringForceField', name="springs", trianglesStiffness=90, trianglesDamping=0.3)
    # obj.addObject('TriangularFEMForceField', name='FEM', youngModulus='5.e2', poissonRatio='0.3', method='large')
    obj.addObject('TriangleCollisionModel')
    # obj.addObject('UncoupledConstraintCorrection', defaultCompliance="0.001")

    # Need change the indices to be equal with manipualtion index ######################################################
    # obj.addObject('LinearMovementConstraint', name='cnt1', template="Vec3", indices=[10])
    # obj.addObject('LinearMovementConstraint', name='cnt2', template="Vec3", indices=[11])

    obj_move_list = []
    for q_i in contact:
        obj_move_list.append(obj.addObject('LinearMovementConstraint', name='cnt'+str(q_i), template="Vec3", indices=[q_i]))

    # 输出Sofa设置信息
    # Sofa.msg_info("Scene", f"Contact indices: {obj_linear_move.indices.value}")
    # Sofa.msg_info("User", f"Fixed indices: {obj_fixed.indices.value}")

    return obj, obj_move_list


class SoftBend(SoftBend2D):
    def __init__(self, shape, fix, contact, dots_list, E, nu, dt, density):
        super().__init__(shape, fix, contact, E, nu, dt, density)
        self.loss = 0.
        self.dots_idx = dots_list
        dots_num = len(dots_list)
        self.dot_pos = ti.Vector.field(2, dtype=ti.f64, shape=dots_num)
        self.dot_pos_init = ti.Vector.field(2, dtype=ti.f64, shape=dots_num)

        print(f"Marker index: {self.dots_idx}")
        self.construct_dot_pos()

    def construct_dot_pos(self):
        for i, idx in enumerate(self.dots_idx):
            self.dot_pos_init[i] = self.mesh.verts.pos_init[idx]

    def update_dot_pos(self):
        for i, idx in enumerate(self.dots_idx):
            self.dot_pos[i] = self.mesh.verts.pos[idx]

    def construct_L_sofa(self, dot_sofa:npt.NDArray):
        """ desired multi feature point on the surface
        """
        self.dL_dq_y.fill(0.)
        loss = 0.
        for i in range(self.marker_N):
            q_i = self.marker_ti[i]
            desired_pos = self.marker_pos_desired[i]
            current_pos = dot_sofa[i, :]
            self.error[i] = current_pos - desired_pos

            self.dL_dq_y[q_i*3]     = 2 * self.error[i].x
            self.dL_dq_y[q_i*3 + 1] = 2 * self.error[i].y
            self.dL_dq_y[q_i*3 + 2] = 2 * self.error[i].z

            loss += self.error[i].norm_sqr()
        return loss

    def compute_dcontact(self, dot_sofa:npt.NDArray):
        loss = self.construct_L_sofa(dot_sofa)
        self.construct_g_hessian()
        self.compute_z_act(10)

        z_np = self.z.to_numpy()
        self.dy_contact = np.multiply(z_np, self.dx_const.to_numpy())
        return loss

def main():
    gain = 5.e2
    shape = [0.1, 0.1]
    fix = range(6)
    contact = [30, 35]
    dots_list = [11, 17, 23, 29]

    contact_sofa = [110, 120]
    dots_sofa = [32, 54, 76, 98]

    node_np, _, ele_np = mesh_obj_tri(shape, 0.01)
    msh_file:str = "Mesh/plane_dense.msh"                   # sofa使用更细分的网格模型
    write_mshv2_tri(msh_file, node_np, ele_np)

    root = Sofa.Core.Node('root')
    _, move_handle = createScene(root, contact_sofa)
    Sofa.Simulation.initRoot(root)

    for step in range(100):
        Sofa.Simulation.animate(root, root.dt.value)

    save_vtu('Mesh/plane_dense.msh', sofa_pos_tmp, f'shape_{step:04d}.vtu')

    exit()

    dt = root.dt.value
    obj = root.getChild('object')
    dofs = obj.getObject('dofs')

    params = {"E": 1.e4, "nu": 0.4, "dt": 0.01, "density": 10.e2}
    soft = SoftBend(shape, fix, contact, dots_list, **params)
    soft.precomputation()
    lhs_np = soft.lhs.to_numpy()
    s_lhs_np = sparse.csc_matrix(lhs_np)
    soft.pre_fact_lhs_solve = spla.factorized(s_lhs_np)

    for step in range(100):
        print(f"Time: {step*soft.dt} ======================================")
        dots_pos_sofa_new = get_marker_pos(dofs, dots_sofa)
        print(f'Detected marker position: {dots_pos_sofa_new.flatten()}')

        sofa_pos_tmp = dofs.findData('position').value
        save_vtu('Mesh/plane_dense.msh', sofa_pos_tmp, f'shape_{step:04d}.vtu')

        soft.substep(step)
        soft.compute_dcontact(dots_pos_sofa_new)
        soft.update_dot_pos()
        print(f"Model marker position: {soft.dot_pos.to_numpy().flatten()}")

        dy_dcontact = soft.dy_contact.reshape(-1, 3)        # reshape到与接触点个数相同
        end_speed = -gain * dy_dcontact[soft.contact_particle_list]
        end_speed_compress = compress_vectors(end_speed, 0.05)
        soft.contact_vel.from_numpy(end_speed_compress)

        print(f"End speed: {end_speed.flatten()}")

        add_move(move_handle, dt, np.repeat(end_speed_compress * dt, 3, axis=0))
        Sofa.Simulation.animate(root, dt)

if __name__ == "__main__":
    main()
